i := 0 .. 100
C[i] := 0
i := 40 .. 60
C[i] := 1
i := 0 .. 100
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N := 100
K := 1
hx := 1
ht := 0.1
lx := 100
lt := 10
T := lt/ht
func(Y) :=
    for k ∈ 1 .. T
        for i ∈ 0 .. N
            c[i] ← 1/ht + 2*K/hx^2
            a[i] ← K/hx^2
            b[i] ← K/hx^2
            f[i] ← Y[i]/ht
        a[0] ← 0
        b[N] ← 0
        α[0] ← 0
        β[0] ← 0
        for i ∈ 0 .. N - 1
            α[i + 1] ← b[i]/(c[i] - a[i]*α[i])
            β[i + 1] ← (f[i] + a[i]*β[i])/(c[i] - a[i]*α[i])
        x[N] ← β[N]
        i ← N - 1
        while i > 1
            x[i - 1] ← β[i] + α[i]*x[i]
            i ← i - 1
        Y ← x
    x
C1 := func(C)
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